# OpenSim document version 30000
Model Version8_15/11/2012:
  credits: Tom Lintern
  length_units: m
  force_units: N
  gravity: 0 -9.80665 0
  BodySet bodies:
    Body ground: mass=0 mass_center=(0 0 0) inertia_xx=0 inertia_yy=0 inertia_zz=0
    Body torso: mass=4.5 mass_center=(0 0 -0.06) inertia_xx=0.00057064 inertia_yy=0.00059777 inertia_zz=0.00070561
        inertia_xy=9.03e-6 inertia_xz=-8.26e-6 inertia_yz=1.398e-5 meshes=torso_edit_dec.obj
      WeldJoint: parent_body=t2 location_in_parent=(-0.03772377 0.02086513 -0.00218583) location=(0 0 0)
    Body spine_markers: mass=0.1 mass_center=(0 0 0) inertia_xx=0 inertia_yy=0 inertia_zz=0 meshes=spine_bracket.stl
      WeldJoint: parent_body=torso location_in_parent=(0.067 0.034 0.005) orientation_in_parent=(5.4749 1.5574 3.95)
          location=(0 0 0)
    Body t2: mass=0.018 mass_center=(0 0 0) inertia_xx=0.00057064 inertia_yy=0.00057064 inertia_zz=0.00057064
        inertia_xy=9.03e-6 inertia_xz=9.03e-6 inertia_yz=9.03e-6 meshes=t2_edit_dec.obj
      CustomJoint t2ToTorso: parent_body=ground location_in_parent=(0 0 0) location=(0 0 0)
        Coordinate t2ToGND_FE: motion_type=rotational default_value=-1.571424 range=(-5 5) clamped=false
            prescribed=true prescribed_function=Constant(value=-1.571424)
        Coordinate t2ToGND_LB: motion_type=rotational default_value=-1.583492 range=(-5 5) clamped=false
            prescribed=true prescribed_function=Constant(value=-1.583492)
        Coordinate t2ToGND_AR: motion_type=rotational default_value=0.003662882 range=(-5 5) clamped=false
            prescribed=true prescribed_function=Constant(value=0.003662882)
        Coordinate t2ToGND_x: motion_type=translational default_value=-0.1496056 range=(-5 5) clamped=false
            prescribed=true prescribed_function=Constant(value=-0.1496056)
        Coordinate t2ToGND_y: motion_type=translational default_value=0.004119878 range=(-5 5) clamped=false
            prescribed=true prescribed_function=Constant(value=0.004119878)
        Coordinate t2ToGND_z: motion_type=translational default_value=-0.01264954 range=(-5 5) clamped=false
            prescribed=true prescribed_function=Constant(value=-0.01264954)
        SpatialTransform:
          TransformAxis rotation1: coordinates=t2ToGND_FE axis=(0 0 1) LinearFunction(coefficients=1 0)
          TransformAxis rotation2: coordinates=t2ToGND_LB axis=(1 0 0) LinearFunction(coefficients=1 0)
          TransformAxis rotation3: coordinates=t2ToGND_AR axis=(0 1 0) LinearFunction(coefficients=1 0)
          TransformAxis translation1: coordinates=t2ToGND_x axis=(1 0 0) LinearFunction(coefficients=1 0)
          TransformAxis translation2: coordinates=t2ToGND_y axis=(0 1 0) LinearFunction(coefficients=1 0)
          TransformAxis translation3: coordinates=t2ToGND_z axis=(0 0 1) LinearFunction(coefficients=1 0)
    Body t1: mass=0.018 mass_center=(0 0 0) inertia_xx=0.00057064 inertia_yy=0.00057064 inertia_zz=0.00057064
        inertia_xy=9.03e-6 inertia_xz=9.03e-6 inertia_yz=9.03e-6 meshes=t1_edit_dec.obj
      CustomJoint t1Tot2: parent_body=t2 location_in_parent=(-0.0001024513 -0.00571 -3.234555e-5)
          orientation_in_parent=(0 0 -0.0394467) location=(0 0.00571 0)
        Coordinate t1Tot2_FE: motion_type=rotational default_value=0 range=(-0.35 0.35) clamped=false
        SpatialTransform: axes_held_at_zero=(rotation2 rotation3 translation1 translation2 translation3)
          TransformAxis rotation1: coordinates=t1Tot2_FE axis=(0 0 1) LinearFunction(coefficients=1 0)
    Body c7: mass=0.018 mass_center=(0 0 0) inertia_xx=0.00057064 inertia_yy=0.00057064 inertia_zz=0.00057064
        inertia_xy=9.03e-6 inertia_xz=9.03e-6 inertia_yz=9.03e-6 meshes=c7_edit_dec.obj
      CustomJoint c7Tot1: parent_body=t1 location_in_parent=(0.00155353 -0.00686325 -0.00011779)
          orientation_in_parent=(0 0 0.06098341) location=(0 0.00686325 0)
        Coordinate c7Tot1_FE: motion_type=rotational default_value=0 range=(-5 5) clamped=false
        SpatialTransform: axes_held_at_zero=(rotation2 rotation3 translation1 translation2 translation3)
          TransformAxis rotation1: coordinates=c7Tot1_FE axis=(0 0 1) LinearFunction(coefficients=1 0)
    Body c6: mass=0.018 mass_center=(0 0 0) inertia_xx=0.00057064 inertia_yy=0.00057064 inertia_zz=0.00057064
        inertia_xy=9.03e-6 inertia_xz=9.03e-6 inertia_yz=9.03e-6 meshes=c6_edit_dec.obj
      CustomJoint c6Toc7: parent_body=c7 location_in_parent=(-0.00097931 -0.00746399 -0.0001038)
          orientation_in_parent=(0 0 0.1322818) location=(0 0.00746399 0)
        Coordinate c6Toc7_FE: motion_type=rotational default_value=0 range=(-5 5) clamped=false
        SpatialTransform: axes_held_at_zero=(rotation2 rotation3 translation1 translation2 translation3)
          TransformAxis rotation1: coordinates=c6Toc7_FE axis=(0 0 1) LinearFunction(coefficients=1 0)
    Body c5: mass=0.018 mass_center=(0 0 0) inertia_xx=0.00057064 inertia_yy=0.00057064 inertia_zz=0.00057064
        inertia_xy=9.03e-6 inertia_xz=9.03e-6 inertia_yz=9.03e-6 meshes=c5_edit_dec.obj
      CustomJoint c5Toc6: parent_body=c6 location_in_parent=(0.0004878532 -0.007231595 -0.0003140073)
          orientation_in_parent=(0 0 0.07573246) location=(0 0.007231595 0)
        Coordinate c5Toc6_FE: motion_type=rotational default_value=0 range=(-5 5) clamped=false
        SpatialTransform: axes_held_at_zero=(rotation2 rotation3 translation1 translation2 translation3)
          TransformAxis rotation1: coordinates=c5Toc6_FE axis=(0 0 1) LinearFunction(coefficients=1 0)
    Body c4: mass=0.018 mass_center=(0 0 0) inertia_xx=0.00057064 inertia_yy=0.00057064 inertia_zz=0.00057064
        inertia_xy=9.03e-6 inertia_xz=9.03e-6 inertia_yz=9.03e-6 meshes=c4_edit_dec.obj
      CustomJoint c4Toc5: parent_body=c5 location_in_parent=(-0.00044401 -0.007704575 0.00015292)
          orientation_in_parent=(0 0 0.1145098) location=(0 0.007704575 0)
        Coordinate c4Toc5_FE: motion_type=rotational default_value=0 range=(-5 5) clamped=false
        SpatialTransform: axes_held_at_zero=(rotation2 rotation3 translation1 translation2 translation3)
          TransformAxis rotation1: coordinates=c4Toc5_FE axis=(0 0 1) LinearFunction(coefficients=1 0)
    Body c3: mass=0.018 mass_center=(0 0 0) inertia_xx=0.00057064 inertia_yy=0.00057064 inertia_zz=0.00057064
        inertia_xy=9.03e-6 inertia_xz=9.03e-6 inertia_yz=9.03e-6 meshes=c3_edit_dec.obj
      CustomJoint c3Toc4: parent_body=c4 location_in_parent=(0.0002786417 -0.00779 -3.400661e-5)
          orientation_in_parent=(0 0 0.09705213) location=(0 0.00779 0)
        Coordinate c3Toc4_FE: motion_type=rotational default_value=0 range=(-5 5) clamped=false
        SpatialTransform: axes_held_at_zero=(rotation2 rotation3 translation1 translation2 translation3)
          TransformAxis rotation1: coordinates=c3Toc4_FE axis=(0 0 1) LinearFunction(coefficients=1 0)
    Body c2: mass=0.018 mass_center=(0 0 0) inertia_xx=0.00057064 inertia_yy=0.00057064 inertia_zz=0.00057064
        inertia_xy=9.03e-6 inertia_xz=9.03e-6 inertia_yz=9.03e-6 meshes=c2_edit_dec.obj
      CustomJoint c2Toc3: parent_body=c3 location_in_parent=(-0.00066846 -0.009632045 0.00021926)
          orientation_in_parent=(0 0 -0.2879049) location=(-0.002 0.009632045 0)
        Coordinate c2Toc3_FE: motion_type=rotational default_value=0 range=(-2 2) clamped=false
        SpatialTransform: axes_held_at_zero=(rotation2 rotation3 translation1 translation2 translation3)
          TransformAxis rotation1: coordinates=c2Toc3_FE axis=(0 0 1) LinearFunction(coefficients=1 0)
    Body c1: mass=0.018 mass_center=(0 0 0) inertia_xx=0.00057064 inertia_yy=0.00057064 inertia_zz=0.00057064
        inertia_xy=9.03e-6 inertia_xz=9.03e-6 inertia_yz=9.03e-6 meshes=c1_edit_dec.obj
      CustomJoint c1Toc2: parent_body=c2 location_in_parent=(0.00031216 -0.009627 0.00042489)
          orientation_in_parent=(0 0 0.1273815) location=(-0.0060538 0.009627 0)
        Coordinate c1Toc2_FE: motion_type=rotational default_value=0 range=(-5 5) clamped=false
        SpatialTransform: axes_held_at_zero=(rotation2 rotation3 translation1 translation2 translation3)
          TransformAxis rotation1: coordinates=c1Toc2_FE axis=(0 0 1) LinearFunction(coefficients=1 0)
    Body sk: mass=0.35 mass_center=(0 0 0) inertia_xx=0.001 inertia_yy=0.001 inertia_zz=0.001 inertia_xy=9.03e-6
        inertia_xz=9.03e-6 inertia_yz=9.03e-6 meshes=sk_edit_dec.obj
      CustomJoint skToc1: parent_body=c1 location_in_parent=(0 -0.008 0) location=(0.035 0.035 0)
          orientation=(0 0 -0.3833995)
        Coordinate skToc1_FE: motion_type=rotational default_value=0 range=(-5 5) clamped=false
        SpatialTransform: axes_held_at_zero=(rotation2 rotation3 translation1 translation2 translation3)
          TransformAxis rotation1: coordinates=skToc1_FE axis=(0 0 1) LinearFunction(coefficients=1 0)
    Body head_markers: mass=0.1 mass_center=(0 0 0.01) inertia_xx=0.0001 inertia_yy=0.0001 inertia_zz=0.0001
        meshes=bracket-head_3screw.stl
      WeldJoint: parent_body=sk location_in_parent=(-0.015 -0.048 -0.001) orientation_in_parent=(1.564 6.1823 1.6225)
          location=(0 0 0)
  ConstraintSet:
    CoordinateCouplerConstraint [values shared by the 8 below unless stated]: independent_coordinate_names=t1Tot2_FE
        scale_factor=1 coupled_coordinates_function=LinearFunction(coefficients=1 0)
    CoordinateCouplerConstraint constraint1: dependent_coordinate_name=c7Tot1_FE
    CoordinateCouplerConstraint constraint2: dependent_coordinate_name=c6Toc7_FE
    CoordinateCouplerConstraint constraint3: dependent_coordinate_name=c5Toc6_FE
    CoordinateCouplerConstraint constraint4: dependent_coordinate_name=c4Toc5_FE
    CoordinateCouplerConstraint constraint5: dependent_coordinate_name=c3Toc4_FE
    CoordinateCouplerConstraint constraint6: dependent_coordinate_name=c2Toc3_FE
    CoordinateCouplerConstraint constraint7: dependent_coordinate_name=c1Toc2_FE
    CoordinateCouplerConstraint constraint8: dependent_coordinate_name=skToc1_FE
  ForceSet forces:
    CoordinateLimitForce [values shared by the 9 below unless stated]: upper_stiffness=0.1174463 [N*m/degree]
        upper_limit=6.005615 [degrees] lower_stiffness=0.1174463 [N*m/degree] lower_limit=-6.005615 [degrees] damping=0
        transition=2 [degrees] compute_dissipation_energy=false
    CoordinateLimitForce t1Tot2_FE_LimitForce: coordinate=t1Tot2_FE
    CoordinateLimitForce c7Tot1_FE_LimitForce: coordinate=c7Tot1_FE
    CoordinateLimitForce c6Toc7_FE_LimitForce: coordinate=c6Toc7_FE
    CoordinateLimitForce c5Toc6_FE_LimitForce: coordinate=c5Toc6_FE
    CoordinateLimitForce c4Toc5_FE_LimitForce: coordinate=c4Toc5_FE
    CoordinateLimitForce c3Toc4_FE_LimitForce: coordinate=c3Toc4_FE
    CoordinateLimitForce c2Toc3_FE_LimitForce: coordinate=c2Toc3_FE
    CoordinateLimitForce c1Toc2_FE_LimitForce: coordinate=c1Toc2_FE
    CoordinateLimitForce skToc1_FE_LimitForce: coordinate=skToc1_FE
    BushingForce [values shared by the 9 below unless stated]: location_body_1=(0 0 0)
        orientation_body_1=(0 0 0.3136449) location_body_2=(0 0 0) orientation_body_2=(0 0 0)
        rotational_stiffness=(0.9930925 0.9930925 0.9930925) translational_stiffness=(0 0 0)
        rotational_damping=(10 10 10) translational_damping=(0 0 0)
    BushingForce t2t1_bushing: body_1=t2 body_2=t1
    BushingForce t1c7_bushing: body_1=t1 body_2=c7
    BushingForce c7c6_bushing: body_1=c7 body_2=c6
    BushingForce c6c5_bushing: body_1=c6 body_2=c5
    BushingForce c5c4_bushing: body_1=c5 body_2=c4
    BushingForce c4c3_bushing: body_1=c4 body_2=c3
    BushingForce c3c2_bushing: body_1=c3 body_2=c2
    BushingForce c2c1_bushing: body_1=c2 body_2=c1
    BushingForce c1sk_bushing: body_1=c1 body_2=sk
  MarkerSet markers:
    Marker m4s: spine_markers (0.1162 -0.0264 0.00457) fixed=true
    Marker m3s: spine_markers (0.1162 -0.0614 0.00457) fixed=true
    Marker m2s: spine_markers (-0.1162 -0.0264 0.00457) fixed=true
    Marker m1s: spine_markers (-0.1162 -0.0514 0.00457) fixed=true
    Marker m1h: head_markers (0.0717 0 -0.054772) fixed=true
    Marker m2h: head_markers (-0.0717 0 -0.038524) fixed=true
    Marker m3h: head_markers (0.0717 0 0.005228) fixed=true
    Marker m5h: head_markers (0.03 0 0.026928) fixed=true
    Marker m4h: head_markers (-0.03 0 0.026928) fixed=true
    Marker m6h: head_markers (-0.0717 0 -0.008524) fixed=true
