# OpenSim document version 20302
InverseKinematicsTool:
  results_directory: ./
  constraint_weight: infinity
  accuracy: 0.00001
  marker_file: ../Lamb2 data files/l2extv2a.trc
  time_range: 4.5 4.6
  report_errors: true
  report_marker_locations: false
  IKTaskSet:
    IKMarkerTask m4s: apply=true weight=50
    IKMarkerTask m3s: apply=true weight=50
    IKMarkerTask m2s: apply=true weight=50
    IKMarkerTask m1s: apply=true weight=50
    IKMarkerTask m1h: apply=true weight=1
    IKMarkerTask m2h: apply=true weight=1
    IKMarkerTask m3h: apply=true weight=1
    IKMarkerTask m5h: apply=true weight=1
    IKMarkerTask m4h: apply=true weight=1
    IKMarkerTask m6h: apply=true weight=1
